# Semster projekt motor
ω_Rot == RPM/(60/(2*π)) solve, RPM → 30*ω_Rot/π
# Motorens rotationsfrekvens bestemmes ud fra kendt anker spænding og strøm
E_a := 1.972
I_a := 0.1632
ω_Rot := 46/(60/(2*π)) = 4.81711
# K_b faktorer beregnes ud fra motor målinger
E_a == R_a*I_a + K_b*ω_Rot solve, K_b → 0.409374192753 - 0.0338792435382*R_a
R_a := 1.27
E_a := 12
K_b := 0.36634
K_t := K_b
NoLoadCurrent := 0.223
NoLoadSpeed := 310
# Motorens væskefriktionsfaktor bestemmes
D_m := D_m*NoLoadSpeed == K_t*NoLoadCurrent solve, D_m → 0.000263528451613
K_t/(R_a*J_m)/(s*(s + 1/J_m*(D_m + K_t*K_b/R_a))) float, 3 → 0.288/(J_m*s*(s + 0.106/J_m))
# Tidskonstanten fra motor analysen defineres og motorens J faktor (som ikke er oplyst i databladet) findes
τ := 0.00993
J_m := 1/τ == 1/J_m*(D_m + K_t*K_b/R_a) solve, J_m → 0.0010519519606
G := K_t/(R_a*J_m)/(s + 1/J_m*(D_m + K_t*K_b/R_a)) float, 3 → 274.0/(s + 101.0)
60/(2*π)*limit(G*12, s → 0) → 310.872150229
# Motorens forventede maksimale omdrejningshastighed er bestemt, og overføringsfunktionen for motorerne med påtrykt masse bestemmes ud fra forskellige parametre:
E_a := 12
RatedRPM := 60/(2*π)*rpm*limit(G*E_a, s → 0) → 310.872150229*rpm
# Motorens moment, hjulenes radius og massen på hver motor defineres.
Torgue := 35 kg*cm
Hjul := 0.075/2
M := 5/2
# Ved at manipulere blokdiagrammet for motoren, kan en overføringsfunktion for motoren med masse findes:
G := K_t/(M*R_a*Hjul^2*s*(D_m/(M*Hjul^2*s) + 1)*(K_b*K_t/(M*R_a*Hjul^2*s*(D_m/(M*Hjul^2*s) + 1)) + 1))  # error: These units are not compatible.
G simplify → 82.049903762/(s + 30.1331209482)
# Herved fås overføringsfunktionen for motorsystemet
60/(2*π)*limit(G*12, s → 0) → 312.022986474
